variable        pH    index 7.0
variable        seed  index 12345
variable        T_low equal 300.0
variable        T_hi  equal 2000.0
variable        dt    equal 0.1

units           real
atom_style      charge
boundary        p p p

read_data       data.pH_${pH}

pair_style      reaxff NULL safezone 10.0 mincap 1000
pair_coeff      * * ../potentials/ffield.reax.SiOH Si O H

fix             qeq all qeq/reaxff 1 0.0 10.0 1.0e-5 reaxff
neighbor        2.0 bin
neigh_modify    every 1 delay 0 check yes

timestep        ${dt}
thermo          500

minimize        1.0e-4 1.0e-6 1000 10000

velocity        all create ${T_low} ${seed} dist gaussian

fix             nvt1 all nvt temp ${T_low} ${T_low} 100.0
fix             deform1 all deform 1 x final 0.0 27.0 y final 0.0 27.0 z final 0.0 27.0 remap x
run             20000
unfix           deform1
run             10000
unfix           nvt1

fix             nvt_heat all nvt temp ${T_low} ${T_hi} 100.0
run             100000
unfix           nvt_heat

write_data      current_pH${pH}.data
